<Lems>

    <!--

        This LEMS file has been automatically generated using PyNeuroML v0.3.16 (libNeuroML v0.2.47)

     -->

    <!-- Specify which component to run -->
    <Target component="SpikingNet"/>

    <!-- Include core NeuroML2 ComponentType definitions -->
    <Include file="Cells.xml"/>
    <Include file="Networks.xml"/>
    <Include file="Simulation.xml"/>

    <Include file="SpikingNet.nml"/>

    <Simulation id="SpikingNet" length="1000ms" step="0.05ms" target="simplenet" seed="12345">  <!-- Note seed: ensures same random numbers used every run -->

        <Display id="display_voltages" title="Voltages" timeScale="1ms" xmin="-100.0" xmax="1100.0" ymin="-68" ymax="-47">
            <Line id="Pop0[0]: Vm" quantity="Pop0[0]/v" scale="1mV" color="#e2570c" timeScale="1ms"/>
            <Line id="Pop0[1]: Vm" quantity="Pop0[1]/v" scale="1mV" color="#528e7e" timeScale="1ms"/>
            <Line id="Pop0[2]: Vm" quantity="Pop0[2]/v" scale="1mV" color="#c2727b" timeScale="1ms"/>
            <Line id="Pop0[3]: Vm" quantity="Pop0[3]/v" scale="1mV" color="#f5cbbb" timeScale="1ms"/>
            <Line id="Pop0[4]: Vm" quantity="Pop0[4]/v" scale="1mV" color="#b41b87" timeScale="1ms"/>
        </Display>

        <OutputFile id="Volts_file" fileName="v.dat">
            <OutputColumn id="v0" quantity="Pop0[0]/v"/>
            <OutputColumn id="v1" quantity="Pop0[1]/v"/>
            <OutputColumn id="v2" quantity="Pop0[2]/v"/>
            <OutputColumn id="v3" quantity="Pop0[3]/v"/>
            <OutputColumn id="v4" quantity="Pop0[4]/v"/>
        </OutputFile>

    </Simulation>

</Lems>
