<Lems>

    <!-- Specify which component to run -->
    <Target component="sim1" reportFile="report.tests.SIMULATOR.txt"/> <!-- SIMULATOR should be replaced with name of simulator -->

    <!-- Include core NeuroML2 ComponentType definitions -->
    <Include file="Cells.xml"/>
    <Include file="Networks.xml"/>
    <Include file="Inputs.xml"/>
    <Include file="PyNN.xml"/>
    <Include file="Simulation.xml"/>

    <spikeGenerator id="spikeGenRegular50" period="50 ms"/>
    <spikeGenerator id="spikeGenRegular5" period="5 ms"/>
    <spikeGenerator id="spikeGenRegular033" period="0.033333 ms"/>

    <spikeGeneratorRandom id="spikeGenRandom" minISI="1.8 ms" maxISI="2.2 ms"/>
    <spikeGeneratorRandom id="spikeGenRandom2" minISI="0.18 ms" maxISI="0.22 ms"/>

    <spikeGeneratorPoisson id="spikeGenPoisson" averageRate="500 Hz"/>
    <spikeGeneratorPoisson id="spikeGenPoisson2" averageRate="20000 Hz"/>

    <SpikeSourcePoisson id="spikeSourcePoisson" start="0ms" duration="50s" rate="500Hz"/>
    <SpikeSourcePoisson id="spikeSourcePoisson2" start="0ms" duration="50s" rate="20000Hz"/>

    <network id="net1">

        <population id="spikeGenRegularPop50" component="spikeGenRegular50" type="populationList" size="1">
            <instance id="0">
                <location x="0" y="0" z="0"/>
            </instance>
        </population>
        <population id="spikeGenRegularPop5" component="spikeGenRegular5" type="populationList" size="1">
            <instance id="0">
                <location x="10" y="0" z="0"/>
            </instance>
        </population>
        <population id="spikeGenRegularPop033" component="spikeGenRegular033" type="populationList" size="1">
            <instance id="0">
                <location x="20" y="0" z="0"/>
            </instance>
        </population>
        <population id="spikeGenRandomPop" component="spikeGenRandom" type="populationList" size="1">
            <instance id="0">
                <location x="30" y="0" z="0"/>
            </instance>
        </population>
        <population id="spikeGenRandomPop2" component="spikeGenRandom2" type="populationList" size="1">
            <instance id="0">
                <location x="40" y="0" z="0"/>
            </instance>
        </population>
        <population id="spikeGenPoissonPop" component="spikeGenPoisson" type="populationList" size="1">
            <instance id="0">
                <location x="50" y="0" z="0"/>
            </instance>
        </population>
        <population id="spikeGenPoissonPop2" component="spikeGenPoisson2" type="populationList" size="1">
            <instance id="0">
                <location x="60" y="0" z="0"/>
            </instance>
        </population>
        <population id="spikeSourcePoissonPop" component="spikeSourcePoisson" type="populationList" size="1">
            <instance id="0">
                <location x="70" y="0" z="0"/>
            </instance>
        </population>
        <population id="spikeSourcePoissonPop2" component="spikeSourcePoisson2" type="populationList" size="1">
            <instance id="0">
                <location x="80" y="0" z="0"/>
            </instance>
        </population>

    </network>

    <!-- End of NeuroML2 content -->

    <Simulation id="sim1" length="5010ms" step="0.025ms" target="net1" seed="123456711"> <!-- Note seed: ensures same random numbers used every run -->

        <Display id="d40" title="E..." timeScale="1ms" xmin="-50" xmax="500" ymin="-5" ymax="55">
            <Line id ="Regular50" quantity="spikeGenRegularPop50/0/spikeGenRegular50/tsince" scale="1ms"  color="#3fffaa" timeScale="1ms"/>
        </Display>

        <OutputFile id="of1" fileName="timesince2.dat">
            <OutputColumn id="t0" quantity="spikeGenRegularPop50/0/spikeGenRegular50/tsince" />
            <!--<OutputColumn id="t1" quantity="spikeGenRegularPop50/0/spikeGenRegular50/tnextf" />-->
        </OutputFile>

        <EventOutputFile id="spikes" fileName="regular.all.spikes" format="ID_TIME">
            <EventSelection id="0" select="spikeGenRegularPop50/0/spikeGenRegular50" eventPort="spike"/>
            <EventSelection id="1" select="spikeGenRegularPop5/0/spikeGenRegular5" eventPort="spike"/>
            <EventSelection id="2" select="spikeGenRegularPop033/0/spikeGenRegular033" eventPort="spike"/>
        </EventOutputFile>

        <EventOutputFile id="spikes2" fileName="random.all.spikes" format="ID_TIME">
            <EventSelection id="0" select="spikeGenRandomPop/0/spikeGenRandom" eventPort="spike"/>
            <EventSelection id="1" select="spikeGenRandomPop2/0/spikeGenRandom2" eventPort="spike"/>
        </EventOutputFile>

        <EventOutputFile id="spikes3" fileName="poisson.all.spikes" format="ID_TIME">
            <EventSelection id="0" select="spikeGenPoissonPop/0/spikeGenPoisson" eventPort="spike"/>
            <EventSelection id="1" select="spikeGenPoissonPop2/0/spikeGenPoisson2" eventPort="spike"/>
        </EventOutputFile>

        <EventOutputFile id="spikes4" fileName="ssp.all.spikes" format="ID_TIME">
            <EventSelection id="0" select="spikeSourcePoissonPop/0/spikeSourcePoisson" eventPort="spike"/>
            <EventSelection id="1" select="spikeSourcePoissonPop2/0/spikeSourcePoisson2" eventPort="spike"/>
        </EventOutputFile>

    </Simulation>

</Lems>
